Edit Load.s1a Daily=my_shape1_load
Edit Load.s2b Daily=my_shape2_load
Edit Load.s4c Daily=my_shape3_load
Edit Load.s5c Daily=my_shape4_load
Edit Load.s6c Daily=my_shape5_load
Edit Load.s7a Daily=my_shape6_load
Edit Load.s9a Daily=my_shape7_load
Edit Load.s10a Daily=my_shape8_load
Edit Load.s11a Daily=my_shape9_load
Edit Load.s12b Daily=my_shape10_load
Edit Load.s16c Daily=my_shape11_load
Edit Load.s17c Daily=my_shape12_load
Edit Load.s19a Daily=my_shape13_load
Edit Load.s20a Daily=my_shape14_load
Edit Load.s22b Daily=my_shape15_load
Edit Load.s24c Daily=my_shape16_load
Edit Load.s28a Daily=my_shape17_load
Edit Load.s29a Daily=my_shape18_load
Edit Load.s30c Daily=my_shape19_load
Edit Load.s31c Daily=my_shape20_load
Edit Load.s32c Daily=my_shape21_load
Edit Load.s33a Daily=my_shape22_load
Edit Load.s34c Daily=my_shape23_load
Edit Load.s35a Daily=my_shape24_load
Edit Load.s37a Daily=my_shape25_load
Edit Load.s38b Daily=my_shape26_load
Edit Load.s39b Daily=my_shape27_load
Edit Load.s41c Daily=my_shape28_load
Edit Load.s42a Daily=my_shape29_load
Edit Load.s43b Daily=my_shape30_load
Edit Load.s45a Daily=my_shape31_load
Edit Load.s46a Daily=my_shape32_load
Edit Load.s47 Daily=my_shape33_load
Edit Load.s48 Daily=my_shape34_load
Edit Load.s49a Daily=my_shape35_load
Edit Load.s49b Daily=my_shape36_load
Edit Load.s49c Daily=my_shape37_load
Edit Load.s50c Daily=my_shape38_load
Edit Load.s51a Daily=my_shape39_load
Edit Load.s52a Daily=my_shape40_load
Edit Load.s53a Daily=my_shape41_load
Edit Load.s55a Daily=my_shape42_load
Edit Load.s56b Daily=my_shape43_load
Edit Load.s58b Daily=my_shape44_load
Edit Load.s59b Daily=my_shape45_load
Edit Load.s60a Daily=my_shape46_load
Edit Load.s62c Daily=my_shape47_load
Edit Load.s63a Daily=my_shape48_load
Edit Load.s64b Daily=my_shape49_load
Edit Load.s65a Daily=my_shape50_load
Edit Load.s65b Daily=my_shape51_load
Edit Load.s65c Daily=my_shape52_load
Edit Load.s66c Daily=my_shape53_load
Edit Load.s68a Daily=my_shape54_load
Edit Load.s69a Daily=my_shape55_load
Edit Load.s70a Daily=my_shape56_load
Edit Load.s71a Daily=my_shape57_load
Edit Load.s73c Daily=my_shape58_load
Edit Load.s74c Daily=my_shape59_load
Edit Load.s75c Daily=my_shape60_load
Edit Load.s76a Daily=my_shape61_load
Edit Load.s76b Daily=my_shape62_load
Edit Load.s76c Daily=my_shape63_load
Edit Load.s77b Daily=my_shape64_load
Edit Load.s79a Daily=my_shape65_load
Edit Load.s80b Daily=my_shape66_load
Edit Load.s82a Daily=my_shape67_load
Edit Load.s83c Daily=my_shape68_load
Edit Load.s84c Daily=my_shape69_load
Edit Load.s85c Daily=my_shape70_load
Edit Load.s86b Daily=my_shape71_load
Edit Load.s87b Daily=my_shape72_load
Edit Load.s88a Daily=my_shape73_load
Edit Load.s90b Daily=my_shape74_load
Edit Load.s92c Daily=my_shape75_load
Edit Load.s94a Daily=my_shape76_load
Edit Load.s95b Daily=my_shape77_load
Edit Load.s96b Daily=my_shape78_load
Edit Load.s98a Daily=my_shape79_load
Edit Load.s99b Daily=my_shape80_load
Edit Load.s100c Daily=my_shape81_load
Edit Load.s102c Daily=my_shape82_load
Edit Load.s103c Daily=my_shape83_load
Edit Load.s104c Daily=my_shape84_load
Edit Load.s106b Daily=my_shape85_load
Edit Load.s107b Daily=my_shape86_load
Edit Load.s109a Daily=my_shape87_load
Edit Load.s111a Daily=my_shape88_load
Edit Load.s112a Daily=my_shape89_load
Edit Load.s113a Daily=my_shape90_load
Edit Load.s114a Daily=my_shape91_load
