Edit Load.s860 Daily=myshape1
Edit Load.s840 Daily=myshape2
Edit Load.s844 Daily=myshape3
Edit Load.s848 Daily=myshape4
Edit Load.s830a Daily=myshape5
Edit Load.s830b Daily=myshape6
Edit Load.s830c Daily=myshape7
Edit Load.s890 Daily=myshape8
Edit Load.d802_806sb Daily=myshape9
Edit Load.d802_806rb Daily=myshape10
Edit Load.d802_806sc Daily=myshape11
Edit Load.d802_806rc Daily=myshape12
Edit Load.d808_810sb Daily=myshape13
Edit Load.d808_810rb Daily=myshape14
Edit Load.d818_820sa Daily=myshape15
Edit Load.d818_820ra Daily=myshape16
Edit Load.d820_822sa Daily=myshape17
Edit Load.d820_822ra Daily=myshape18
Edit Load.d816_824sb Daily=myshape19
Edit Load.d816_824rb Daily=myshape20
Edit Load.d824_826sb Daily=myshape21
Edit Load.d824_826rb Daily=myshape22
Edit Load.d824_828sc Daily=myshape23
Edit Load.d824_828rc Daily=myshape24
Edit Load.d828_830sa Daily=myshape25
Edit Load.d828_830ra Daily=myshape26
Edit Load.d854_856sb Daily=myshape27
Edit Load.d854_856rb Daily=myshape28
Edit Load.d832_858sa Daily=myshape29
Edit Load.d832_858ra Daily=myshape30
Edit Load.d832_858sb Daily=myshape31
Edit Load.d832_858rb Daily=myshape32
Edit Load.d832_858sc Daily=myshape33
Edit Load.d832_858rc Daily=myshape34
Edit Load.d858_864sb Daily=myshape35
Edit Load.d858_864rb Daily=myshape36
Edit Load.d858_834sa Daily=myshape37
Edit Load.d858_834ra Daily=myshape38
Edit Load.d858_834sb Daily=myshape39
Edit Load.d858_834rb Daily=myshape40
Edit Load.d858_834sc Daily=myshape41
Edit Load.d858_834rc Daily=myshape42
Edit Load.d834_860sa Daily=myshape43
Edit Load.d834_860ra Daily=myshape44
Edit Load.d834_860sb Daily=myshape45
Edit Load.d834_860rb Daily=myshape46
Edit Load.d834_860sc Daily=myshape47
Edit Load.d834_860rc Daily=myshape48
Edit Load.d860_836sa Daily=myshape49
Edit Load.d860_836ra Daily=myshape50
Edit Load.d860_836sb Daily=myshape51
Edit Load.d860_836rb Daily=myshape52
Edit Load.d860_836sc Daily=myshape53
Edit Load.d860_836rc Daily=myshape54
Edit Load.d836_840sa Daily=myshape55
Edit Load.d836_840ra Daily=myshape56
Edit Load.d836_840sb Daily=myshape57
Edit Load.d836_840rb Daily=myshape58
Edit Load.d862_838sb Daily=myshape59
Edit Load.d862_838rb Daily=myshape60
Edit Load.d842_844sa Daily=myshape61
Edit Load.d842_844ra Daily=myshape62
Edit Load.d844_846sb Daily=myshape63
Edit Load.d844_846rb Daily=myshape64
Edit Load.d844_846sc Daily=myshape65
Edit Load.d844_846rc Daily=myshape66
Edit Load.d846_848sb Daily=myshape67
Edit Load.d846_848rb Daily=myshape68
